*Heading
** Job name: VOXEL_MODEL Model name: VOXEL_MODEL
** Generated by: Abaqus/CAE 2017
*Preprint, echo=NO, model=NO, history=NO, contact=NO
**
** PARTS
**
*Part, name=VOXEL_PART
*End Part
**
**
** ASSEMBLY
**
*Assembly, name=Assembly
**
*Instance, name=VOXEL_INSTANCE, part=VOXEL_PART
*Node
      1,           0.,           0.
      2, 0.0500000007,           0.
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*Element, type=CPS4
   1,    1,    2,   83,   82
   2,   82,   83,  164,  163
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*Elset, elset=DENSITY_000000000
 1640, 1641, 1718, 1719, 1720, 1721
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*Elset, elset=DENSITY_025000000
 1639, 1642, 1717, 1724, 1796, 1805
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*Elset, elset=DENSITY_050000000
 1560, 1561, 1638, 1643, 1954, 1967
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*Elset, elset=DENSITY_075000000
 1559, 1562, 1637, 1644, 1716, 1725
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*Elset, elset=DENSITY_100000000
    1,    2,    3,    4,    5,    6
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** Section: SOLID_SECTION_MATERIAL_100000000
*Solid Section, elset=DENSITY_100000000, material=MATERIAL_100000000
,
** Section: SOLID_SECTION_MATERIAL_075000000
*Solid Section, elset=DENSITY_075000000, material=MATERIAL_075000000
,
** Section: SOLID_SECTION_MATERIAL_050000000
*Solid Section, elset=DENSITY_050000000, material=MATERIAL_050000000
,
** Section: SOLID_SECTION_MATERIAL_025000000
*Solid Section, elset=DENSITY_025000000, material=MATERIAL_025000000
,
** Section: SOLID_SECTION_MATERIAL_000000000
*Solid Section, elset=DENSITY_000000000, material=MATERIAL_000000000
,
*End Instance
**
*Nset, nset=CEILING_DISPLACEMENT, instance=VOXEL_INSTANCE, generate
 6481,  6561,     1
*Nset, nset=FLOOR_PINNED, instance=VOXEL_INSTANCE
 1,
*Nset, nset=FLOOR_Y_SYMMETRY, instance=VOXEL_INSTANCE, generate
  1,  81,   1
*End Assembly
**
** MATERIALS
**
*Material, name=MATERIAL_000000000
*Elastic
 0.01, 0.35
*Material, name=MATERIAL_025000000
*Elastic
 0.25, 0.35
*Material, name=MATERIAL_050000000
*Elastic
 0.5, 0.35
*Material, name=MATERIAL_075000000
*Elastic
 0.75, 0.35
*Material, name=MATERIAL_100000000
*Elastic
1., 0.35
** ----------------------------------------------------------------
**
** STEP: TENSION
**
*Step, name=TENSION, nlgeom=NO
*Static
1., 1., 1e-05, 1.
**
** BOUNDARY CONDITIONS
**
** Name: CEILING_DISPLACEMENT Type: Displacement/Rotation
*Boundary
CEILING_DISPLACEMENT, 2, 2, 4.
** Name: FLOOR_PINNED Type: Symmetry/Antisymmetry/Encastre
*Boundary
FLOOR_PINNED, PINNED
** Name: FLOOR_Y_SYMMETRY Type: Symmetry/Antisymmetry/Encastre
*Boundary
FLOOR_Y_SYMMETRY, YSYMM
**
** OUTPUT REQUESTS
**
*Restart, write, frequency=0
**
** FIELD OUTPUT: F-Output-1, F-Output-TENSION
**
*Output, field, variable=PRESELECT
**
** HISTORY OUTPUT: H-Output-1, H-Output-TENSION
**
*Output, history, variable=PRESELECT
*End Step
